Rods_count := 3  # Количество стержней магнитопровода
Mass_core := 8933 kg  # Масса магнитопровода
Rod_diameter := 460 mm  # Диаметр стержня магнитопровода
Center_distance := 890 mm  # Межосевое расстояние магнитопровода
Window_height := 1190 mm  # Высота окна магнитопровода
Winding_weight_1_obm := 295 kg  # Масса 1 обмотки
Winding_weight_2_obm := 1029 kg  # Масса 2 обмотки
Winding_weight_3_obm := 1446 kg  # Масса 3 обмотки
Winding_height_1_obm := 955 mm  # Высота 1 обмотки
Winding_height_2_obm := 955 mm  # Высота 2 обмотки
Winding_height_3_obm := 955 mm  # Высота 3 обмотки
Cylinder_inner_diam_1_obm := 460 mm  # Внутренний диаметр цилиндра 1 обмотки
Cylinder_outer_diam_1_obm := 480 mm  # Внешний диаметр цилиндра 1 обмотки
Cylinder_inner_diam_2_obm := 650 mm  # Внутренний диаметр цилиндра 2 обмотки
Cylinder_outer_diam_2_obm := 662 mm  # Внешний диаметр цилиндра 2 обмотки
Cylinder_inner_diam_3_obm := 760 mm  # Внутренний диаметр цилиндра 3 обмотки
Cylinder_outer_diam_3_obm := 772 mm  # Внешний диаметр цилиндра 3 обмотки
Winding_inner_diam_1_obm := 520 mm  # Внутренний диаметр меди 1 обмотки
Winding_outer_diam_1_obm := 626 mm  # Внешний диаметр меди 1 обмотки
Winding_inner_diam_2_obm := 686 mm  # Внутренний диаметр меди 2 обмотки
Winding_outer_diam_2_obm := 732 mm  # Внешний диаметр меди 2 обмотки
Winding_inner_diam_3_obm := 792 mm  # Внутренний диаметр меди 3 обмотки
Winding_outer_diam_3_obm := 860 mm  # Внешний диаметр меди 3 обмотки
Yoke_copper_l_01 := 80 mm  # Расстояние ярмо - медь (1 обмотка)
Yoke_copper_l_02 := 80 mm  # Расстояние ярмо - медь (2 обмотка)
Yoke_copper_l_03 := 80 mm  # Расстояние ярмо - медь (3 обмотка)
Pressing_Force_1_obm := 2 kgf  # Усилие опрессовки 1 обмотки
Pressing_Force_2_obm := 2 kgf  # Усилие опрессовки 2 обмотки
Pressing_Force_3_obm := 2 kgf  # Усилие опрессовки 3 обмотки
Mass_active_part := 2 kg  # Масса активной части
